// COMSOL Multiphysics 6.3.0.290 model "flexible_hitter.mph"
// Outline of the model tree

Geometry
  geom1 "Geometry 1" (3D, length unit cm)
    blk1: Block | size = {10, 0.5, 7}
    wp1: WorkPlane | quickplane = zx; unite = on; workplane3d = on
      pol1: Polygon
        type = open
        source = table
        table = 
          {3, 1.5}
          {3, 0.5}
          {2.5, 0.5}
          {2.5, 1.5}
          {0.500678151846, 1.50197315216}
          {0.500678151846, 9.00197315216}
          {2.00067815185, 9.00197315216}
          {2, 3}
          {2.5, 3}
          {2.5, 9}
          {4.5, 9}
          {4.5, 3}
          {5, 3}
          {5, 9}
          {6.5, 9}
          {6.5, 3}
          {6.5, 1.5}
          {4.5, 1.5}
          {4.5, 0.5}
          {4, 0.5}
          {4, 1.5}
      pol2: Polygon
        type = open
        source = table
        table = {{3, 1.5}, {3, 2}, {1, 2}, {1, 8.5}, {1.5, 8.5}, {1.5, 3}, {1.5, 2.5}, {3, 2.5}, {3, 8.5}, {4, 8.5}, {4, 2.5}, {5.5, 2.5}, {5.5, 8.5}, {6, 8.5}, {6, 2}, {4, 2}, {4, 1.5}}
      coi1: Coincident | entity1 = pol2(1) boundaries 1; entity2 = pol1(1) boundaries 1
      tanc1: TangentConstraint | edge1 = pol2(1) boundaries 1; edge2 = pol1(1) boundaries 1
      uni1: Union "snake" | input = pol2, pol1; keep = on; intbnd = off; edge = all
      off1: Offset | input = uni1; distance = 0.05
      del1: Delete "Delete Entities 1" | input = uni1
      csol2: ConvertToSolid | input = off1
    ext1: Extrude | extrudefrom = faces; workplane = wp1; inputface = wp1.uni boundaries 2; distance = 1e-4; reverse = on
    fin: Finalize "Form Union"

Materials
  mat1: Common "TD-NiCr [solid]" on domains 2
    def: def "Basic"
      density = 8300[kg/m^3]
  mat2: Common "Kapton H [solid,from Yokoyama]" on domains 1
    def: def "Basic"
      thermalconductivity = k_solid_from_Yokoyama_1(T)
      heatcapacity = C(T)
      density = 1420[kg/m^3]
      TD = TD(T)
      k_solid_from_Yokoyama_1: Piecewise | arg = T; pieces = {5.0, 320.0, 0.0169082637+0.00273007238*T^1}; argunit = K; fununit = W/(m*K)
      C: Piecewise
        arg = T
        pieces = 
          {4.0, 30.0, 2.809665621-1.394348543*T^1+0.2106638561*T^2+0.004752015656*T^3-3.279997847E-4*T^4+4.282248688E-6*T^5}
          {30.0, 300.0, -86.85311476+7.816916992*T^1-0.03664788194*T^2+9.912799744E-5*T^3-1.084409538E-7*T^4}
        argunit = K
        fununit = J/(kg*K)
      TD: Piecewise
        arg = T
        pieces = 
          {5.0, 17.0, 8.70278934E-5-3.73471827E-5*T^1+7.09110449E-6*T^2-7.35737844E-7*T^3+4.33803195E-8*T^4-1.36778497E-9*T^5+1.7936756E-11*T^6}
          {17.0, 45.0, 5.90593809E-6-7.88477309E-7*T^1+5.07780799E-8*T^2-1.81119644E-9*T^3+3.69114753E-11*T^4-4.02901781E-13*T^5+1.82879448E-15*T^6}
          {45.0, 113.0, 1.04209822E-6-3.69259387E-8*T^1+8.8813516E-10*T^2-1.19890073E-11*T^3+9.39482382E-14*T^4-3.97903285E-16*T^5+7.0519682E-19*T^6}
          {113.0, 300.0, 4.8037702E-7-3.60096836E-9*T^1+3.85489674E-11*T^2-1.88101337E-13*T^3+5.2930655E-16*T^4-8.50064316E-19*T^5+6.34809465E-22*T^6}
        argunit = K
        fununit = m^2/s

Physics
  ht: HeatTransfer "Heat Transfer in Solids" on domains 1, 2
    dependent variable T
    solid1: SolidHeatTransferModel "Solid 1" (default)
    init1: init "Initial Values 1" (default)
    ins1: ThermalInsulation (default)
  ec: ConductiveMedia "Electric Currents" on domains 2
    dependent variable V
    PortSweepSettings.useSweep = 0
    cucn1: CurrentConservation (default) | materialType = solid
    ein1: ElectricInsulation (default)
    init1: init "Initial Values 1" (default) | V = 5

Multiphysics
  emh1: ElectromagneticHeating on all domains | EMHeat_physics = ec; Heat_physics = ht

Mesh
  mesh1 "Mesh 1" (physics-controlled)

Studies
  std1 "Study 1"
    time: Transient "Time Dependent" | tlist = range(0,0.1,1)

Solver configurations
  sol1 "Solution 1" (study std1)

Datasets
  dset1: Solution | solution = sol1